// COMSOL Multiphysics 4.0.0.982 model "inductive_axialAligned_d=6cm_theta=45_Ir=0_x2_withSecondary.mph"
// Wireless power: Solid conductor exchanging magnetic currents.
// Outline of the model tree

Selections
  sel1 "Transmitter Coil"
  sel2 "Receiver Coil"
  sel3 "Receiver Coil 2"

Geometry
  geom1 "Geometry 1" (3D, length unit cm)
    wp1: WorkPlane | quickplane = zx; quicky = -3
      c1: Circle | pos = {0, 0}; type = curve; layer = 0.5; r = 3.5
      c2: Circle | type = curve; layer = .0762; r = 0.75
      c3: Circle | type = curve; layer = .0762; r = 1
      c4: Circle | type = curve; layer = .0762; r = 0.5
    mir1: Mirror | input = wp1.c1, wp1.c2, wp1.c3, wp1.c4; keep = on
    mov2: Move | input = mir1(1), mir1(2), mir1(3), mir1(4); keep = on; displ = {0, 6, 0}
    sph1: Sphere | pos = {0, 0, 0}; r = 25
    sph2: Sphere (disabled) | r = 5
    rot1: Rotate | input = mov2(1), mov2(2), mov2(3), mov2(4); keep = off; rot = 45; pos = {0, 0, 0}
    rot2: Rotate | input = rot1(1), rot1(2), rot1(3), rot1(4); keep = on; rot = 260; pos = {0.5, 0, 0}
    copy1: Copy | input = rot1(1), rot1(2), rot1(3), rot1(4)
    fin: Finalize "Form Union"

Materials
  mat1 "Air"
    def "Basic"
      density = rho(pA,T)
      heatcapacity = Cp(T)
      soundspeed = cs(T)
      ratioofspecificheat = 1.4
      relpermeability = 1
      relpermittivity = 1
      electricconductivity = 0
      thermalconductivity = k(T)
      dynamicviscosity = eta(T)
      eta: Piecewise | arg = T; extrap = constant; pieces = {200.0, 1600.0, -8.38278E-7+8.35717342E-8*T^1-7.69429583E-11*T^2+4.6437266E-14*T^3-1.06585607E-17*T^4}
      Cp: Piecewise | arg = T; extrap = constant; pieces = {200.0, 1600.0, 1047.63657-0.372589265*T^1+9.45304214E-4*T^2-6.02409443E-7*T^3+1.2858961E-10*T^4}
      k: Piecewise | arg = T; extrap = constant; pieces = {200.0, 1600.0, -0.00227583562+1.15480022E-4*T^1-7.90252856E-8*T^2+4.11702505E-11*T^3-7.43864331E-15*T^4}
      rho: Analytic | expr = pA*0.02897/8.314/T; args = {pA, T}; dermethod = manual; argders = {{pA, d(pA*0.02897/8.314/T,pA)}, {T, d(pA*0.02897/8.314/T,T)}}
      cs: Analytic | expr = sqrt(1.4*287*T); args = T; dermethod = manual; argders = {T, d(sqrt(1.4*287*T),T)}

Physics
  mf: InductionCurrents "Magnetic Fields"
    dependent variable A = {Ax, Ay, Az}
    al1: AmperesLaw "Ampère's Law 1"
    mi1: MagneticInsulation
    init1: init "Initial Values 1"
    edc1: EdgeCurrent | Ie = 1
    edc3: EdgeCurrent | Ie = 0
    edc4: EdgeCurrent | Ie = 0

Mesh
  mesh1 "Mesh 1"
    size: MeshSizeDefault | hauto = 8
    auto_f1: FreeTet "Free Tetrahedral 1" | xscale = 1; yscale = 1; zscale = 1

Studies
  std1 "Study 1"
    stat1: Stationary

Solver configurations
  sol1 "Solver Sequence 1" (study std1)
    v1: Variables
    s1: Stationary | stol = 5.1010
      fc1: FullyCoupled | linsolver = i1
      i1: Iterative | linsolver = fgmres
        mg1: Multigrid

Datasets
  dset1: Solution | solution = sol1

Derived values
  int1: IntLine "Line Integration Tx" | data = dset1; table = tbl1; expr = tAx*t1x+tAy*t1y+tAz*t1z
  int2: IntLine "Line Integration Rx" | data = dset1; table = tbl3; expr = tAx*t1x+tAy*t1y+tAz*t1z

Tables
  tbl1: Table
    // Line Integration 1 (tAx*t1x+tAy*t1y+tAz*t1z)
    tAx*t1x+tAy*t1y+tAz*t1z (Wb)
    2.8561e-07
  tbl2: Table
    // Line Integration 2 (mf.normB)
    Magnetic flux density norm (Wb/m) | Magnetic flux density, x component (Wb/m) | tAx*t1x+tAy*t1y+tAz*t1z (Wb)
    0.000144099 | -7.25286e-06 | -2.8174e-07
  tbl3: Table
    // Line Integration 2 (tAx*t1x+tAy*t1y+tAz*t1z)
    tAx*t1x+tAy*t1y+tAz*t1z (Wb)
    -2.8174e-07

Plots
  pg1: PlotGroup3D "3D Plot Group 1" | data = dset1
    surf1: Surface | expr = mf.normB
  pg2: PlotGroup3D "3D Plot Group 2" | data = dset1
    slc1: Slice
      expr = log10(mod1.mf.normB)
      quickplane = zx
      quickynumber = 2
      quickznumber = 1
      genpoints = {{0, 0, 0}, {1, 0, 0}, {0, 1, 0}}
    str1: Streamline | expr = {mf.Hx, mf.Hy, mf.Hz}; normal = on

Exports
  img1: Image3D "Output Image"
    width = 1200
    pngfilename = C:\Users\ctucker\aeonProjectDirectory\Monkey-Man\thesis\fields\projects\inductive link\v40a\figures\inductive_axialAligned_d=6cm_theta=45_Ir=0_x2_withSecondary.png
  anim1: Animation
    movietype = avi
    avifilename = C:\Users\ctucker\aeonProjectDirectory\Monkey-Man\thesis\fields\projects\inductive link\v40a\figures\inductive_axialAlignment_movie.avi
    sweeptype = solutions
    staticframes = 48