// COMSOL Multiphysics 4.2 (Build: 150) model "newVisionInductive.mph"
// Wireless power: Litz plus a secondary winding.
// Outline of the model tree

Coordinate systems
  sys1: Boundary "Boundary System 1"

Geometry
  geom1 "Geometry 1" (3D, length unit cm)
    wp1: WorkPlane | quickplane = zx; quicky = -1.5
      c1: Circle | pos = {0, 0}; type = curve; layer = 0.5; r = 3.5
      c2: Circle (disabled) | type = curve; layer = 0.1; r = 3.25
      c3: Circle (disabled) | type = curve; layer = 0.1; r = 3
    mir1: Mirror | input = wp1
    mov2: Move | input = mir1; keep = on; disply = 9
    sph1: Sphere | pos = {0, 0, 0}; r = 25
    sph2: Sphere (disabled) | r = 5
    fin: Finalize "Form Union"

Materials
  mat1 "Air" on all domains
    def "Basic"
      density = rho(pA,T)
      heatcapacity = Cp(T)
      soundspeed = cs(T)
      ratioofspecificheat = 1.4
      relpermeability = 1
      relpermittivity = 1
      electricconductivity = 0
      thermalconductivity = k(T)
      dynamicviscosity = eta(T)
      eta: Piecewise | arg = T; extrap = constant; pieces = {200.0, 1600.0, -8.38278E-7+8.35717342E-8*T^1-7.69429583E-11*T^2+4.6437266E-14*T^3-1.06585607E-17*T^4}
      Cp: Piecewise | arg = T; extrap = constant; pieces = {200.0, 1600.0, 1047.63657-0.372589265*T^1+9.45304214E-4*T^2-6.02409443E-7*T^3+1.2858961E-10*T^4}
      k: Piecewise | arg = T; extrap = constant; pieces = {200.0, 1600.0, -0.00227583562+1.15480022E-4*T^1-7.90252856E-8*T^2+4.11702505E-11*T^3-7.43864331E-15*T^4}
      rho: Analytic | expr = pA*0.02897/8.314/T; args = {pA, T}; dermethod = manual; argders = {{pA, d(pA*0.02897/8.314/T,pA)}, {T, d(pA*0.02897/8.314/T,T)}}
      cs: Analytic | expr = sqrt(1.4*287*T); args = T; dermethod = manual; argders = {T, d(sqrt(1.4*287*T),T)}

Physics
  mf: InductionCurrents "Magnetic Fields" on all domains
    dependent variable A = {Ax, Ay, Az}
    EquationForm.form = Automatic
    EquationForm.freq_src = userdef
    EquationForm.freq = 450[kHz]
    al1: AmperesLaw "Ampère's Law 1" (default) | sigma_mat = from_mat; mur_mat = from_mat
    mi1: MagneticInsulation (default)
    init1: init "Initial Values 1" (default)
    edc1: EdgeCurrent on selection sel1 | Ie = 1
    edc3: EdgeCurrent (disabled) on selection sel2 | Ie = -1

Mesh
  mesh1 "Mesh 1" (physics-controlled)
    size: MeshSizeDefault | hauto = 5

Studies
  std1 "Study 1"
    stat1: Stationary | physselection = mf
    eig: Eigenfrequency (disabled) | physselection = mf; neigs = 6

Solver configurations
  sol1 "Solver Sequence 1" (study std1)
    v1: Variables
    s1: Stationary | stol = 5.1010
      fc1: FullyCoupled | linsolver = i1
      i1: Iterative | linsolver = fgmres
        mg1: Multigrid

Datasets
  dset1: Solution | solution = sol1

Derived values
  int1: IntLine "Line Integration Tx" on all dimension-1 entities
    data = dset1
    table = tbl1
    expr = tAx*t1x+tAy*t1y+tAz*t1z
  int2: IntLine "Line Integration Rx" | data = dset1; table = tbl3; expr = tAx*t1x+tAy*t1y+tAz*t1z

Tables
  tbl1: Table
    // Line Integration 1 (tAx*t1x+tAy*t1y+tAz*t1z)
    tAx*t1x+tAy*t1y+tAz*t1z (Wb)
    2.8561e-07
  tbl2: Table
    // Line Integration 2 (mf.normB)
    Magnetic flux density norm (Wb/m) | Magnetic flux density, x component (Wb/m) | tAx*t1x+tAy*t1y+tAz*t1z (Wb)
    0.000144099 | -7.25286e-06 | -2.8174e-07
  tbl3: Table
    // Line Integration 2 (tAx*t1x+tAy*t1y+tAz*t1z)
    tAx*t1x+tAy*t1y+tAz*t1z (Wb)
    -2.8174e-07

Plots
  pg1: PlotGroup3D "3D Plot Group 1" (disabled) | data = dset1
    surf1: Surface | expr = mf.normB
  pg2: PlotGroup3D "3D Plot Group 2" | data = dset1
    slc1: Slice
      expr = log10(mod1.mf.normB)
      quickplane = zx
      quickynumber = 2
      quickznumber = 1
      genpoints = {{0, 0, 0}, {1, 0, 0}, {0, 1, 0}}
    str1: Streamline | expr = {mf.Hx, mf.Hy, mf.Hz}; normal = on

Exports
  img1: Image3D "Output Image"
    width = 1200
    pngfilename = C:\Users\aeon\PROJECTS\thesis\fields\projects\inductive link\new figures\depiction of field emissions.png
  anim1: Animation
    movietype = avi
    avifilename = C:\Users\ctucker\aeonProjectDirectory\Monkey-Man\thesis\fields\projects\inductive link\v40a\figures\inductive_axialAlignment_movie.avi
    sweeptype = solutions
    staticframes = 48