// COMSOL Multiphysics 4.0.0.982 model "concentric_spiral_approximation.mph"
// This model undertakes the assumption of reasonable approximation that the spiral winding is a series of concentric circles.
// Outline of the model tree

Selections
  sel1 "Transmitter"
  sel2 "Receiver"

Geometry
  geom1 "Geometry 1" (3D, length unit cm)
    wp1: WorkPlane | quickplane = zx
      c1: Circle | type = curve; r = 6
      c2: Circle | type = curve; r = 5.75
      c3: Circle | type = curve; r = 5.50
      c4: Circle | type = curve; r = 5.25
      c5: Circle | type = curve; r = 5
      c6: Circle | type = curve; r = 4.75
      c7: Circle | type = curve; r = 4.5
      c8: Circle | type = curve; r = 4.25
      c9: Circle | type = curve; r = 4
      c10: Circle | type = curve; r = 3.75
      c11: Circle | type = curve; r = 3.5
      c12: Circle | type = curve; r = 3.25
      c13: Circle | type = curve; r = 3
      c14: Circle | type = curve; r = 2.75
      c15: Circle | type = curve; r = 2.5
      c16: Circle | type = curve; r = 2.25
      c17: Circle | type = curve; r = 2
      c18: Circle | type = curve; r = 1.75
      c19: Circle | type = curve; r = 1.5
      c20: Circle | type = curve; r = 1.25
      c21: Circle | type = curve; r = 1
    mov1: Move
      input = wp1.c1, wp1.c10, wp1.c11, wp1.c12, wp1.c13, wp1.c14, wp1.c15, wp1.c16, wp1.c17, wp1.c18, wp1.c19, wp1.c2, wp1.c20, wp1.c21, wp1.c3, wp1.c4, wp1.c5, wp1.c6, wp1.c7, wp1.c8, wp1.c9
      keep = on
      displ = {0, -10, 0}
    mir1: Mirror
      input = mov1(1), mov1(10), mov1(11), mov1(12), mov1(13), mov1(14), mov1(15), mov1(16), mov1(17), mov1(18), mov1(19), mov1(2), mov1(20), mov1(21), mov1(3), mov1(4), mov1(5), mov1(6), mov1(7), mov1(8), mov1(9)
      keep = off
      axis = {0, 10, 0}
    sph1: Sphere | pos = {0, 5, 0}; r = 25
    fin: Finalize "Form Union"

Materials
  mat1 "Air"
    def "Basic"
      relpermeability = 1
      relpermittivity = 1
      dynamicviscosity = eta(T[1/K])[Pa*s]
      ratioofspecificheat = 1.4
      electricconductivity = 0[S/m]
      heatcapacity = Cp(T[1/K])[J/(kg*K)]
      density = rho(pA[1/Pa],T[1/K])[kg/m^3]
      thermalconductivity = k(T[1/K])[W/(m*K)]
      soundspeed = cs(T[1/K])[m/s]
      eta: Piecewise | arg = T; extrap = constant; pieces = {200.0, 1600.0, -8.38278E-7+8.35717342E-8*T^1-7.69429583E-11*T^2+4.6437266E-14*T^3-1.06585607E-17*T^4}
      Cp: Piecewise | arg = T; extrap = constant; pieces = {200.0, 1600.0, 1047.63657-0.372589265*T^1+9.45304214E-4*T^2-6.02409443E-7*T^3+1.2858961E-10*T^4}
      rho: Analytic | expr = pA*0.02897/8.314/T; args = {pA, T}; dermethod = manual; argders = {{pA, d(pA*0.02897/8.314/T,pA)}, {T, d(pA*0.02897/8.314/T,T)}}
      k: Piecewise | arg = T; extrap = constant; pieces = {200.0, 1600.0, -0.00227583562+1.15480022E-4*T^1-7.90252856E-8*T^2+4.11702505E-11*T^3-7.43864331E-15*T^4}
      cs: Analytic | expr = sqrt(1.4*287*T); args = T; dermethod = manual; argders = {T, d(sqrt(1.4*287*T),T)}

Physics
  mf: InductionCurrents "Magnetic Fields"
    dependent variable A = {Ax, Ay, Az}
    al1: AmperesLaw "Ampère's Law 1"
    mi1: MagneticInsulation
    init1: init "Initial Values 1"
    edc1: EdgeCurrent | Ie = 1
    edc2: EdgeCurrent | Ie = -1

Mesh
  mesh1 "Mesh 1"
    size: MeshSizeDefault | hauto = 7
    ftet1: FreeTet "Free Tetrahedral 1"

Studies
  std1 "Study 1"
    stat: Stationary

Solver configurations
  sol1 "Solver 1" (study std1)
    v1: Variables "Dependent Variables 1"
    s1: Stationary "Stationary Solver 1"
      fc1: FullyCoupled | linsolver = i1
      i1: Iterative | linsolver = fgmres
        mg1: Multigrid

Datasets
  dset1: Solution | solution = sol1

Plots
  pg1: PlotGroup3D "3D Plot Group 1" | data = dset1
    surf1: Surface | expr = mf.normB
  pg2: PlotGroup3D "3D Plot Group 2" | data = dset1
    slc1: Slice
      expr = log10(mod1.mf.normB)
      quickplane = zx
      quickznumber = 2
      quickxnumber = 2
      quickynumber = 2
      genpoints = {{0, 0, 0}, {1, 0, 0}, {0, 1, 0}}
    str1: Streamline | expr = {mf.Bx, mf.By, mf.Bz}

Exports
  img1: Image3D "Image 1"
    pngfilename = C:\Users\ctucker\aeonProjectDirectory\Monkey-Man\thesis\IET Paper\physics\Spiral Approximation.png